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# Non inverting Buck-Boost design
# 1) Specifications:
# Input voltage range:
Vimin := 10 V
Vimax := 48 V
# Nominal output voltage:
Vo := 21 V
# Output power
Po := 60 W
# Switching Frequency:
fs := 30 kHz
# Inductor current ripple:
ΔI_% := 10 %
# Capacitor voltage ripple:
ΔV_% := 1 %
# 2) Preliminar calculations:
# Duty cycle range:
Dmin := Vo/(Vimax + Vo)
Dmin = 0.304348
Dmax := Vo/(Vimin + Vo)
Dmax = 0.677419
# Output Current:
Io := Po/Vo
Io = 2.85714 A
# Absolute Inductor current ripple:
ΔI := ΔI_%*Io
ΔI = 0.285714 A
# Absolute Capacitor voltage ripple:
ΔV := ΔV_%*Vo
ΔV = 0.21 V
# 3) Inductor design:
# Inductance:
Li := Vo*(1 - Dmin)/(ΔI*fs)
Li = 1.70435 mH
# Maximum current
I_Lmax := Io + ΔI/2
I_Lmax = 3 A
# Average current:
I_Lavg := Io
I_Lavg = 2.85714 A
# RMS current:
I_Lrms := Io
I_Lrms = 2.85714 A
# 4) Capacitor design:
# Capacitância:
Ca := (100*Io*(1 - Dmin)/(Vo*fs))
C = 1000000 V*μF
Co := (Io*Dmax/(ΔV*fs))
Co = 0.00030722 F
# Tensao Máxima:
V_Cmax := Vo + ΔV/2
V_Cmax = 21.105 V
# 5) Transistor maximum ratings (for both S1 and S2):
# Maximum switch current:
I_Smax := Io + ΔI/2
I_Smax = 3 A
# Maximum voltage
V_Smax := Vimax
V_Smax = 48 V
# Average current
I_Smed := Io*Dmax
I_Smed = 1.93548 A
# 6) Diodes D1 e D2
# Maximum Voltage
V_D := Vimax
V_D = 48 V
I_D := Po/Vo
I_D = 2.85714 A
# Maximum Current
# Transfere valores para o psim
Lin := Li/(1 H)
Cout := Co/(1 F)
Lin = 0.00170435
Cout = 0.00030722
data := ["L", Lin; "Co", Cout]
# [component: inputs data]
