# Projeto Físico do Indutor
# Especificações de projeto
Li := 1.704 mH  # Indutância desejada
fs := 30 kHz  # Frequencia de chaveamento
I_Lmax := 3 A  # Corrente máxima do indutor
I_Lef := 2.87 A  # Corrente eficaz do indutor
____________________________________________________________________________
# Máxima Indução:
B_max := 0.3 T
# Máxima Densidade
# de Corrente:
J_max := 450*A/cm^2
# Fator de Ocupação
# do Cobre:
k_w := 0.7
# Permeabilidade do Ar:
μ_o := 4*π*10^-7*H/m
# Produto de Áreas:
AeAw := Li*I_Lmax*I_Lef/(B_max*J_max*k_w)
AeAw = 1.55253 cm^4
# Adotou-se o núcleo E-42/21/20, com as seguintes características:
A_e := 2.4 cm^2
A_w := 1.57 cm^2
# Número de Espiras:
Ne := ceil(Li*I_Lmax/(B_max*A_e))
Ne = 71
# Comprimento do Entreferro:
e := Ne^2*μ_o*A_e/Li
e = 0.892212 mm
# Profundidade de Penetração:
d_max := 15/sqrt(fs)*sqrt(Hz)*cm
d_max = 0.000866025 m
# O condutor máximo a ser utilizado é 21AWG, com a seguinte área:
S_max := 0.004105 cm^2
# Área do Fio Condutor:
S_fio := I_Lef/J_max
S_fio = 0.00637778 cm^2
# Número de Fios em Paralelo:
n := S_fio/S_max
n = 1.55366
n := 2
# utilizar 2 fios AWG
# O fio adotado é 21 AWG com a seguinte área:
S_xx := 0.005004 cm^2
# Possibilidade de Execução:
A_w_min := Ne*S_xx*n/k_w
A_w_min = 1.0151 cm^2
Exec := A_w_min/A_w
Exec = 0.646559
# Fator de execução tem de ser menor que 0,7
# Resumo das especificações
# Núcleo: E-42/21/20
# Número de Espiras: 71 espiras
# Enreferro: mm
# Fio Condutor: 21 AWG
# Indutância =  mH
